// SBML level 2 version 1
// Model Starts Here

model NCAv0_84()
  // This model was generated using Nca v0.84.
  // Date generated : 2004-01-21 13:21:30
  // For further information or bug reports please contact:.
  // Riccardo Boscolo riccardo@ee.ucla.edu
  // or
  // Jesse S.A. Bridgewater jsab@pobox.com

  // Compartments:
  compartment compartment = 1;

  // Species:
  species sink in compartment = 0;  // substance in dimensionless
  species aceB in compartment = 1;  // substance in mrna
  species $src_aceB in compartment = 1;  // substance in mrna
  species aceK in compartment = 1;  // substance in mrna
  species $src_aceK in compartment = 1;  // substance in mrna
  species acs in compartment = 1;  // substance in mrna
  species $src_acs in compartment = 1;  // substance in mrna
  species gatD in compartment = 1;  // substance in mrna
  species $src_gatD in compartment = 1;  // substance in mrna
  species gatA in compartment = 1;  // substance in mrna
  species $src_gatA in compartment = 1;  // substance in mrna
  species gatC in compartment = 1;  // substance in mrna
  species $src_gatC in compartment = 1;  // substance in mrna
  species sucD in compartment = 1;  // substance in mrna
  species $src_sucD in compartment = 1;  // substance in mrna
  species sucC in compartment = 1;  // substance in mrna
  species $src_sucC in compartment = 1;  // substance in mrna
  species sdhB in compartment = 1;  // substance in mrna
  species $src_sdhB in compartment = 1;  // substance in mrna
  species sdhA in compartment = 1;  // substance in mrna
  species $src_sdhA in compartment = 1;  // substance in mrna
  species sucB in compartment = 1;  // substance in mrna
  species $src_sucB in compartment = 1;  // substance in mrna
  species livJ in compartment = 1;  // substance in mrna
  species $src_livJ in compartment = 1;  // substance in mrna
  species aroM in compartment = 1;  // substance in mrna
  species $src_aroM in compartment = 1;  // substance in mrna
  species mdh in compartment = 1;  // substance in mrna
  species $src_mdh in compartment = 1;  // substance in mrna
  species livK in compartment = 1;  // substance in mrna
  species $src_livK in compartment = 1;  // substance in mrna
  species ilvH in compartment = 1;  // substance in mrna
  species $src_ilvH in compartment = 1;  // substance in mrna
  species cysM in compartment = 1;  // substance in mrna
  species $src_cysM in compartment = 1;  // substance in mrna
  species cyoA in compartment = 1;  // substance in mrna
  species $src_cyoA in compartment = 1;  // substance in mrna
  species guaB in compartment = 1;  // substance in mrna
  species $src_guaB in compartment = 1;  // substance in mrna
  species pstS in compartment = 1;  // substance in mrna
  species $src_pstS in compartment = 1;  // substance in mrna
  species nuoH in compartment = 1;  // substance in mrna
  species $src_nuoH in compartment = 1;  // substance in mrna
  species ilvB in compartment = 1;  // substance in mrna
  species $src_ilvB in compartment = 1;  // substance in mrna
  species narH in compartment = 1;  // substance in mrna
  species $src_narH in compartment = 1;  // substance in mrna
  species lrp in compartment = 1;  // substance in mrna
  species $src_lrp in compartment = 1;  // substance in mrna
  species gatY in compartment = 1;  // substance in mrna
  species $src_gatY in compartment = 1;  // substance in mrna
  species nuoJ in compartment = 1;  // substance in mrna
  species $src_nuoJ in compartment = 1;  // substance in mrna
  species gltA in compartment = 1;  // substance in mrna
  species $src_gltA in compartment = 1;  // substance in mrna
  species tnaL in compartment = 1;  // substance in mrna
  species $src_tnaL in compartment = 1;  // substance in mrna
  species dapA in compartment = 1;  // substance in mrna
  species $src_dapA in compartment = 1;  // substance in mrna
  species ugpE in compartment = 1;  // substance in mrna
  species $src_ugpE in compartment = 1;  // substance in mrna
  species nuoE in compartment = 1;  // substance in mrna
  species $src_nuoE in compartment = 1;  // substance in mrna
  species nrfE in compartment = 1;  // substance in mrna
  species $src_nrfE in compartment = 1;  // substance in mrna
  species cyoB in compartment = 1;  // substance in mrna
  species $src_cyoB in compartment = 1;  // substance in mrna
  species rfaF in compartment = 1;  // substance in mrna
  species $src_rfaF in compartment = 1;  // substance in mrna
  species nuoA in compartment = 1;  // substance in mrna
  species $src_nuoA in compartment = 1;  // substance in mrna
  species surA in compartment = 1;  // substance in mrna
  species $src_surA in compartment = 1;  // substance in mrna
  species nuoF in compartment = 1;  // substance in mrna
  species $src_nuoF in compartment = 1;  // substance in mrna
  species narY in compartment = 1;  // substance in mrna
  species $src_narY in compartment = 1;  // substance in mrna
  species proP in compartment = 1;  // substance in mrna
  species $src_proP in compartment = 1;  // substance in mrna
  species adhE in compartment = 1;  // substance in mrna
  species $src_adhE in compartment = 1;  // substance in mrna
  species narI in compartment = 1;  // substance in mrna
  species $src_narI in compartment = 1;  // substance in mrna
  species pykF in compartment = 1;  // substance in mrna
  species $src_pykF in compartment = 1;  // substance in mrna
  species rpoD in compartment = 1;  // substance in mrna
  species $src_rpoD in compartment = 1;  // substance in mrna
  species pstC in compartment = 1;  // substance in mrna
  species $src_pstC in compartment = 1;  // substance in mrna
  species rpoE in compartment = 1;  // substance in mrna
  species $src_rpoE in compartment = 1;  // substance in mrna
  species arcA in compartment = 1;  // substance in mrna
  species $src_arcA in compartment = 1;  // substance in mrna
  species cysA in compartment = 1;  // substance in mrna
  species $src_cysA in compartment = 1;  // substance in mrna
  species aroG in compartment = 1;  // substance in mrna
  species $src_aroG in compartment = 1;  // substance in mrna
  species ugpB in compartment = 1;  // substance in mrna
  species $src_ugpB in compartment = 1;  // substance in mrna
  species serA in compartment = 1;  // substance in mrna
  species $src_serA in compartment = 1;  // substance in mrna
  species glgP in compartment = 1;  // substance in mrna
  species $src_glgP in compartment = 1;  // substance in mrna
  species kbl in compartment = 1;  // substance in mrna
  species $src_kbl in compartment = 1;  // substance in mrna
  species purM in compartment = 1;  // substance in mrna
  species $src_purM in compartment = 1;  // substance in mrna
  species phoR in compartment = 1;  // substance in mrna
  species $src_phoR in compartment = 1;  // substance in mrna
  species rseC in compartment = 1;  // substance in mrna
  species $src_rseC in compartment = 1;  // substance in mrna
  species mdoH in compartment = 1;  // substance in mrna
  species $src_mdoH in compartment = 1;  // substance in mrna
  species cysK in compartment = 1;  // substance in mrna
  species $src_cysK in compartment = 1;  // substance in mrna
  species tyrR in compartment = 1;  // substance in mrna
  species $src_tyrR in compartment = 1;  // substance in mrna
  species cysH in compartment = 1;  // substance in mrna
  species $src_cysH in compartment = 1;  // substance in mrna
  species aroP in compartment = 1;  // substance in mrna
  species $src_aroP in compartment = 1;  // substance in mrna
  species glgS in compartment = 1;  // substance in mrna
  species $src_glgS in compartment = 1;  // substance in mrna
  species purA in compartment = 1;  // substance in mrna
  species $src_purA in compartment = 1;  // substance in mrna
  species purK in compartment = 1;  // substance in mrna
  species $src_purK in compartment = 1;  // substance in mrna
  species leuC in compartment = 1;  // substance in mrna
  species $src_leuC in compartment = 1;  // substance in mrna
  species leuA in compartment = 1;  // substance in mrna
  species $src_leuA in compartment = 1;  // substance in mrna
  species leuB in compartment = 1;  // substance in mrna
  species $src_leuB in compartment = 1;  // substance in mrna
  species trpA in compartment = 1;  // substance in mrna
  species $src_trpA in compartment = 1;  // substance in mrna
  species trpC in compartment = 1;  // substance in mrna
  species $src_trpC in compartment = 1;  // substance in mrna
  species aroF in compartment = 1;  // substance in mrna
  species $src_aroF in compartment = 1;  // substance in mrna
  species tyrA in compartment = 1;  // substance in mrna
  species $src_tyrA in compartment = 1;  // substance in mrna
  species uspA in compartment = 1;  // substance in mrna
  species $src_uspA in compartment = 1;  // substance in mrna
  species fabA in compartment = 1;  // substance in mrna
  species $src_fabA in compartment = 1;  // substance in mrna
  species iclR in compartment = 1;  // substance in mrna
  species $src_iclR in compartment = 1;  // substance in mrna
  species epd in compartment = 1;  // substance in mrna
  species $src_epd in compartment = 1;  // substance in mrna
  species aidB in compartment = 1;  // substance in mrna
  species $src_aidB in compartment = 1;  // substance in mrna
  species csgD in compartment = 1;  // substance in mrna
  species $src_csgD in compartment = 1;  // substance in mrna
  species csgE in compartment = 1;  // substance in mrna
  species $src_csgE in compartment = 1;  // substance in mrna
  species csgF in compartment = 1;  // substance in mrna
  species $src_csgF in compartment = 1;  // substance in mrna
  species csiE in compartment = 1;  // substance in mrna
  species $src_csiE in compartment = 1;  // substance in mrna
  species ftsZ in compartment = 1;  // substance in mrna
  species $src_ftsZ in compartment = 1;  // substance in mrna
  species galE in compartment = 1;  // substance in mrna
  species $src_galE in compartment = 1;  // substance in mrna
  species galK in compartment = 1;  // substance in mrna
  species $src_galK in compartment = 1;  // substance in mrna
  species galT in compartment = 1;  // substance in mrna
  species $src_galT in compartment = 1;  // substance in mrna
  species glgA in compartment = 1;  // substance in mrna
  species $src_glgA in compartment = 1;  // substance in mrna
  species glpD in compartment = 1;  // substance in mrna
  species $src_glpD in compartment = 1;  // substance in mrna
  species gor in compartment = 1;  // substance in mrna
  species $src_gor in compartment = 1;  // substance in mrna
  species hdeA in compartment = 1;  // substance in mrna
  species $src_hdeA in compartment = 1;  // substance in mrna
  species hdeB in compartment = 1;  // substance in mrna
  species $src_hdeB in compartment = 1;  // substance in mrna
  species ldcC in compartment = 1;  // substance in mrna
  species $src_ldcC in compartment = 1;  // substance in mrna
  species mutH in compartment = 1;  // substance in mrna
  species $src_mutH in compartment = 1;  // substance in mrna
  species osmE in compartment = 1;  // substance in mrna
  species $src_osmE in compartment = 1;  // substance in mrna
  species poxB in compartment = 1;  // substance in mrna
  species $src_poxB in compartment = 1;  // substance in mrna
  species pspA in compartment = 1;  // substance in mrna
  species $src_pspA in compartment = 1;  // substance in mrna
  species rob in compartment = 1;  // substance in mrna
  species $src_rob in compartment = 1;  // substance in mrna
  species topA in compartment = 1;  // substance in mrna
  species $src_topA in compartment = 1;  // substance in mrna
  species wrbA in compartment = 1;  // substance in mrna
  species $src_wrbA in compartment = 1;  // substance in mrna
  species xthA in compartment = 1;  // substance in mrna
  species $src_xthA in compartment = 1;  // substance in mrna
  species yciG in compartment = 1;  // substance in mrna
  species $src_yciG in compartment = 1;  // substance in mrna
  species ppsA in compartment = 1;  // substance in mrna
  species $src_ppsA in compartment = 1;  // substance in mrna
  species ArcA in compartment;  // substance in dimensionless
  species CRP in compartment;  // substance in dimensionless
  species CysB in compartment;  // substance in dimensionless
  species FadR in compartment;  // substance in dimensionless
  species FruR in compartment;  // substance in dimensionless
  species GatR in compartment;  // substance in dimensionless
  species IclR in compartment;  // substance in dimensionless
  species LeuO in compartment;  // substance in dimensionless
  species Lrp in compartment;  // substance in dimensionless
  species NarL in compartment;  // substance in dimensionless
  species PhoB in compartment;  // substance in dimensionless
  species PurR in compartment;  // substance in dimensionless
  species RpoE in compartment;  // substance in dimensionless
  species RpoS in compartment;  // substance in dimensionless
  species TrpR in compartment;  // substance in dimensionless
  species TyrR in compartment;  // substance in dimensionless

  // Parameters:
  alpha = 1 tfa2mrna;
  mean = 131 time;
  std = 132.1363 dimensionless;
  cstime has time;

  // Assignment rules:
  cstime := (time - mean)/std;
  ArcA := 2.172674 + (-2.827959*cstime^1) + 5.624919*cstime^2 + (-5.5462*cstime^3) + (-4.276518*cstime^4) + 8.370724*cstime^5 + (-2.836977*cstime^6);
  CRP := 2.368367 + (-0.7869455*cstime^1) + 0.6588742*cstime^2 + (-2.317321*cstime^3) + (-0.5869801*cstime^4) + 3.242126*cstime^5 + (-1.295428*cstime^6);
  CysB := 2.780536 + 0.2800551*cstime^1 + (-2.230745*cstime^2) + 1.232028*cstime^3 + 0.7492192*cstime^4 + (-1.127441*cstime^5) + 0.3569308*cstime^6;
  FadR := 1.290305 + 0.311279*cstime^1 + 0.4750275*cstime^2 + (-1.851944*cstime^3) + (-0.05104825*cstime^4) + 1.575396*cstime^5 + (-0.6141592*cstime^6);
  FruR := 1.182924 + 1.025932*cstime^1 + (-0.4352362*cstime^2) + 0.3731775*cstime^3 + 0.3958317*cstime^4 + (-0.8736969*cstime^5) + 0.3290642*cstime^6;
  GatR := 0.2262487 + (-0.4473972*cstime^1) + 0.2381768*cstime^2 + 0.9043989*cstime^3 + (-0.2925947*cstime^4) + (-0.7611492*cstime^5) + 0.3624347*cstime^6;
  IclR := 0.1095697 + 0.1994577*cstime^1 + 0.6047264*cstime^2 + (-1.80792*cstime^3) + 0.6195375*cstime^4 + 0.7367195*cstime^5 + (-0.3622635*cstime^6);
  LeuO := 0.2775817 + (-0.3374332*cstime^1) + (-0.3583552*cstime^2) + 2.190567*cstime^3 + (-0.1128557*cstime^4) + (-2.034939*cstime^5) + 0.8575793*cstime^6;
  Lrp := 1.46927 + (-0.5612266*cstime^1) + 0.5533165*cstime^2 + (-0.4167179*cstime^3) + (-0.596537*cstime^4) + 1.040255*cstime^5 + (-0.360875*cstime^6);
  NarL := 2.589878 + (-1.085574*cstime^1) + 0.2798777*cstime^2 + (-0.3906576*cstime^3) + (-0.9232472*cstime^4) + 1.779206*cstime^5 + (-0.6457508*cstime^6);
  PhoB := 0.8220057 + 0.1222511*cstime^1 + 0.7050053*cstime^2 + (-1.554722*cstime^3) + (-0.1103076*cstime^4) + 1.247344*cstime^5 + (-0.4721812*cstime^6);
  PurR := 1.579366 + (-1.119082*cstime^1) + 5.211625*cstime^2 + (-7.680951*cstime^3) + (-2.429778*cstime^4) + 8.448096*cstime^5 + (-3.107511*cstime^6);
  RpoE := 0.8938135 + 0.06742121*cstime^1 + (-0.5311344*cstime^2) + 0.76119*cstime^3 + 0.3347119*cstime^4 + (-0.802543*cstime^5) + 0.2651616*cstime^6;
  RpoS := 1.418676 + (-0.02351084*cstime^1) + 0.2197772*cstime^2 + (-0.8382841*cstime^3) + (-0.1024835*cstime^4) + 0.9491168*cstime^5 + (-0.3810055*cstime^6);
  TrpR := 1.686217 + 0.4183265*cstime^1 + 0.2444785*cstime^2 + (-2.547937*cstime^3) + 0.2829707*cstime^4 + 2.376811*cstime^5 + (-1.039558*cstime^6);
  TyrR := 1.565957 + (-0.2030159*cstime^1) + 0.6639039*cstime^2 + (-1.078504*cstime^3) + (-0.233768*cstime^4) + 1.4556*cstime^5 + (-0.6154174*cstime^6);

  // Reactions:
  r_0: aceB => sink; k_aceB*aceB;
    k_aceB = 1 degcnst;
  r_1: aceK => sink; k_aceK*aceK;
    k_aceK = 1 degcnst;
  r_2: acs => sink; k_acs*acs;
    k_acs = 1 degcnst;
  r_3: gatD => sink; k_gatD*gatD;
    k_gatD = 1 degcnst;
  r_4: gatA => sink; k_gatA*gatA;
    k_gatA = 1 degcnst;
  r_5: gatC => sink; k_gatC*gatC;
    k_gatC = 1 degcnst;
  r_6: sucD => sink; k_sucD*sucD;
    k_sucD = 1 degcnst;
  r_7: sucC => sink; k_sucC*sucC;
    k_sucC = 1 degcnst;
  r_8: sdhB => sink; k_sdhB*sdhB;
    k_sdhB = 1 degcnst;
  r_9: sdhA => sink; k_sdhA*sdhA;
    k_sdhA = 1 degcnst;
  r_10: sucB => sink; k_sucB*sucB;
    k_sucB = 1 degcnst;
  r_11: livJ => sink; k_livJ*livJ;
    k_livJ = 1 degcnst;
  r_12: aroM => sink; k_aroM*aroM;
    k_aroM = 1 degcnst;
  r_13: mdh => sink; k_mdh*mdh;
    k_mdh = 1 degcnst;
  r_14: livK => sink; k_livK*livK;
    k_livK = 1 degcnst;
  r_15: ilvH => sink; k_ilvH*ilvH;
    k_ilvH = 1 degcnst;
  r_16: cysM => sink; k_cysM*cysM;
    k_cysM = 1 degcnst;
  r_17: cyoA => sink; k_cyoA*cyoA;
    k_cyoA = 1 degcnst;
  r_18: guaB => sink; k_guaB*guaB;
    k_guaB = 1 degcnst;
  r_19: pstS => sink; k_pstS*pstS;
    k_pstS = 1 degcnst;
  r_20: nuoH => sink; k_nuoH*nuoH;
    k_nuoH = 1 degcnst;
  r_21: ilvB => sink; k_ilvB*ilvB;
    k_ilvB = 1 degcnst;
  r_22: narH => sink; k_narH*narH;
    k_narH = 1 degcnst;
  r_23: lrp => sink; k_lrp*lrp;
    k_lrp = 1 degcnst;
  r_24: gatY => sink; k_gatY*gatY;
    k_gatY = 1 degcnst;
  r_25: nuoJ => sink; k_nuoJ*nuoJ;
    k_nuoJ = 1 degcnst;
  r_26: gltA => sink; k_gltA*gltA;
    k_gltA = 1 degcnst;
  r_27: tnaL => sink; k_tnaL*tnaL;
    k_tnaL = 1 degcnst;
  r_28: dapA => sink; k_dapA*dapA;
    k_dapA = 1 degcnst;
  r_29: ugpE => sink; k_ugpE*ugpE;
    k_ugpE = 1 degcnst;
  r_30: nuoE => sink; k_nuoE*nuoE;
    k_nuoE = 1 degcnst;
  r_31: nrfE => sink; k_nrfE*nrfE;
    k_nrfE = 1 degcnst;
  r_32: cyoB => sink; k_cyoB*cyoB;
    k_cyoB = 1 degcnst;
  r_33: rfaF => sink; k_rfaF*rfaF;
    k_rfaF = 1 degcnst;
  r_34: nuoA => sink; k_nuoA*nuoA;
    k_nuoA = 1 degcnst;
  r_35: surA => sink; k_surA*surA;
    k_surA = 1 degcnst;
  r_36: nuoF => sink; k_nuoF*nuoF;
    k_nuoF = 1 degcnst;
  r_37: narY => sink; k_narY*narY;
    k_narY = 1 degcnst;
  r_38: proP => sink; k_proP*proP;
    k_proP = 1 degcnst;
  r_39: adhE => sink; k_adhE*adhE;
    k_adhE = 1 degcnst;
  r_40: narI => sink; k_narI*narI;
    k_narI = 1 degcnst;
  r_41: pykF => sink; k_pykF*pykF;
    k_pykF = 1 degcnst;
  r_42: rpoD => sink; k_rpoD*rpoD;
    k_rpoD = 1 degcnst;
  r_43: pstC => sink; k_pstC*pstC;
    k_pstC = 1 degcnst;
  r_44: rpoE => sink; k_rpoE*rpoE;
    k_rpoE = 1 degcnst;
  r_45: arcA => sink; k_arcA*arcA;
    k_arcA = 1 degcnst;
  r_46: cysA => sink; k_cysA*cysA;
    k_cysA = 1 degcnst;
  r_47: aroG => sink; k_aroG*aroG;
    k_aroG = 1 degcnst;
  r_48: ugpB => sink; k_ugpB*ugpB;
    k_ugpB = 1 degcnst;
  r_49: serA => sink; k_serA*serA;
    k_serA = 1 degcnst;
  r_50: glgP => sink; k_glgP*glgP;
    k_glgP = 1 degcnst;
  r_51: kbl => sink; k_kbl*kbl;
    k_kbl = 1 degcnst;
  r_52: purM => sink; k_purM*purM;
    k_purM = 1 degcnst;
  r_53: phoR => sink; k_phoR*phoR;
    k_phoR = 1 degcnst;
  r_54: rseC => sink; k_rseC*rseC;
    k_rseC = 1 degcnst;
  r_55: mdoH => sink; k_mdoH*mdoH;
    k_mdoH = 1 degcnst;
  r_56: cysK => sink; k_cysK*cysK;
    k_cysK = 1 degcnst;
  r_57: tyrR => sink; k_tyrR*tyrR;
    k_tyrR = 1 degcnst;
  r_58: cysH => sink; k_cysH*cysH;
    k_cysH = 1 degcnst;
  r_59: aroP => sink; k_aroP*aroP;
    k_aroP = 1 degcnst;
  r_60: glgS => sink; k_glgS*glgS;
    k_glgS = 1 degcnst;
  r_61: purA => sink; k_purA*purA;
    k_purA = 1 degcnst;
  r_62: purK => sink; k_purK*purK;
    k_purK = 1 degcnst;
  r_63: leuC => sink; k_leuC*leuC;
    k_leuC = 1 degcnst;
  r_64: leuA => sink; k_leuA*leuA;
    k_leuA = 1 degcnst;
  r_65: leuB => sink; k_leuB*leuB;
    k_leuB = 1 degcnst;
  r_66: trpA => sink; k_trpA*trpA;
    k_trpA = 1 degcnst;
  r_67: trpC => sink; k_trpC*trpC;
    k_trpC = 1 degcnst;
  r_68: aroF => sink; k_aroF*aroF;
    k_aroF = 1 degcnst;
  r_69: tyrA => sink; k_tyrA*tyrA;
    k_tyrA = 1 degcnst;
  r_70: uspA => sink; k_uspA*uspA;
    k_uspA = 1 degcnst;
  r_71: fabA => sink; k_fabA*fabA;
    k_fabA = 1 degcnst;
  r_72: iclR => sink; k_iclR*iclR;
    k_iclR = 1 degcnst;
  r_73: epd => sink; k_epd*epd;
    k_epd = 1 degcnst;
  r_74: aidB => sink; k_aidB*aidB;
    k_aidB = 1 degcnst;
  r_75: csgD => sink; k_csgD*csgD;
    k_csgD = 1 degcnst;
  r_76: csgE => sink; k_csgE*csgE;
    k_csgE = 1 degcnst;
  r_77: csgF => sink; k_csgF*csgF;
    k_csgF = 1 degcnst;
  r_78: csiE => sink; k_csiE*csiE;
    k_csiE = 1 degcnst;
  r_79: ftsZ => sink; k_ftsZ*ftsZ;
    k_ftsZ = 1 degcnst;
  r_80: galE => sink; k_galE*galE;
    k_galE = 1 degcnst;
  r_81: galK => sink; k_galK*galK;
    k_galK = 1 degcnst;
  r_82: galT => sink; k_galT*galT;
    k_galT = 1 degcnst;
  r_83: glgA => sink; k_glgA*glgA;
    k_glgA = 1 degcnst;
  r_84: glpD => sink; k_glpD*glpD;
    k_glpD = 1 degcnst;
  r_85: gor => sink; k_gor*gor;
    k_gor = 1 degcnst;
  r_86: hdeA => sink; k_hdeA*hdeA;
    k_hdeA = 1 degcnst;
  r_87: hdeB => sink; k_hdeB*hdeB;
    k_hdeB = 1 degcnst;
  r_88: ldcC => sink; k_ldcC*ldcC;
    k_ldcC = 1 degcnst;
  r_89: mutH => sink; k_mutH*mutH;
    k_mutH = 1 degcnst;
  r_90: osmE => sink; k_osmE*osmE;
    k_osmE = 1 degcnst;
  r_91: poxB => sink; k_poxB*poxB;
    k_poxB = 1 degcnst;
  r_92: pspA => sink; k_pspA*pspA;
    k_pspA = 1 degcnst;
  r_93: rob => sink; k_rob*rob;
    k_rob = 1 degcnst;
  r_94: topA => sink; k_topA*topA;
    k_topA = 1 degcnst;
  r_95: wrbA => sink; k_wrbA*wrbA;
    k_wrbA = 1 degcnst;
  r_96: xthA => sink; k_xthA*xthA;
    k_xthA = 1 degcnst;
  r_97: yciG => sink; k_yciG*yciG;
    k_yciG = 1 degcnst;
  r_98: ppsA => sink; k_ppsA*ppsA;
    k_ppsA = 1 degcnst;
  src_99: $src_aceB => aceB; alpha*IclR^src_99_k_1;  // modifiers: IclR
    src_99_k_1 = -0.7178152 dimensionless;
  src_100: $src_aceK => aceK; alpha*IclR^src_100_k_1;  // modifiers: IclR
    src_100_k_1 = -0.7040876 dimensionless;
  src_101: $src_acs => acs; alpha*CRP^src_101_k_1*IclR^src_101_k_2*RpoS^k_3;  // modifiers: CRP, IclR, RpoS
    src_101_k_1 = -3.326905 dimensionless; src_101_k_2 = 0.0630249 dimensionless; k_3 = 15.75233 dimensionless;
  src_102: $src_gatD => gatD; alpha*GatR^src_102_k_1;  // modifiers: GatR
    src_102_k_1 = -1.100341 dimensionless;
  src_103: $src_gatA => gatA; alpha*GatR^src_103_k_1;  // modifiers: GatR
    src_103_k_1 = -0.9928057 dimensionless;
  src_104: $src_gatC => gatC; alpha*GatR^src_104_k_1;  // modifiers: GatR
    src_104_k_1 = -1.007297 dimensionless;
  src_105: $src_sucD => sucD; alpha*ArcA^src_105_k_1*CRP^src_105_k_2;  // modifiers: ArcA, CRP
    src_105_k_1 = -3.01412 dimensionless; src_105_k_2 = 3.888036 dimensionless;
  src_106: $src_sucC => sucC; alpha*ArcA^src_106_k_1*CRP^src_106_k_2;  // modifiers: ArcA, CRP
    src_106_k_1 = -3.068799 dimensionless; src_106_k_2 = 4.304391 dimensionless;
  src_107: $src_sdhB => sdhB; alpha*ArcA^src_107_k_1*CRP^src_107_k_2;  // modifiers: ArcA, CRP
    src_107_k_1 = -2.8902 dimensionless; src_107_k_2 = 4.2851 dimensionless;
  src_108: $src_sdhA => sdhA; alpha*ArcA^src_108_k_1*CRP^src_108_k_2;  // modifiers: ArcA, CRP
    src_108_k_1 = -2.964441 dimensionless; src_108_k_2 = 4.586961 dimensionless;
  src_109: $src_sucB => sucB; alpha*ArcA^src_109_k_1*CRP^src_109_k_2;  // modifiers: ArcA, CRP
    src_109_k_1 = -2.620652 dimensionless; src_109_k_2 = 3.497141 dimensionless;
  src_110: $src_livJ => livJ; alpha*Lrp^src_110_k_1;  // modifiers: Lrp
    src_110_k_1 = -3.856077 dimensionless;
  src_111: $src_aroM => aroM; alpha*TrpR^src_111_k_1*TyrR^src_111_k_2;  // modifiers: TrpR, TyrR
    src_111_k_1 = 1.844962 dimensionless; src_111_k_2 = -0.2240703 dimensionless;
  src_112: $src_mdh => mdh; alpha*ArcA^src_112_k_1*CRP^src_112_k_2;  // modifiers: ArcA, CRP
    src_112_k_1 = -1.293279 dimensionless; src_112_k_2 = 1.117467 dimensionless;
  src_113: $src_livK => livK; alpha*Lrp^src_113_k_1;  // modifiers: Lrp
    src_113_k_1 = -2.954458 dimensionless;
  src_114: $src_ilvH => ilvH; alpha*Lrp^src_114_k_1;  // modifiers: Lrp
    src_114_k_1 = -0.5923707 dimensionless;
  src_115: $src_cysM => cysM; alpha*CysB^src_115_k_1;  // modifiers: CysB
    src_115_k_1 = 0.3029835 dimensionless;
  src_116: $src_cyoA => cyoA; alpha*ArcA^src_116_k_1;  // modifiers: ArcA
    src_116_k_1 = -0.5128356 dimensionless;
  src_117: $src_guaB => guaB; alpha*PurR^src_117_k_1;  // modifiers: PurR
    src_117_k_1 = -1.37909 dimensionless;
  src_118: $src_pstS => pstS; alpha*PhoB^src_118_k_1;  // modifiers: PhoB
    src_118_k_1 = -1.3808 dimensionless;
  src_119: $src_nuoH => nuoH; alpha*ArcA^src_119_k_1*NarL^src_119_k_2;  // modifiers: ArcA, NarL
    src_119_k_1 = -0.6317062 dimensionless; src_119_k_2 = 1.435707 dimensionless;
  src_120: $src_ilvB => ilvB; alpha*CRP^src_120_k_1;  // modifiers: CRP
    src_120_k_1 = 0.8645307 dimensionless;
  src_121: $src_narH => narH; alpha*NarL^src_121_k_1;  // modifiers: NarL
    src_121_k_1 = 0.6886834 dimensionless;
  src_122: $src_lrp => lrp; alpha*Lrp^src_122_k_1;  // modifiers: Lrp
    src_122_k_1 = -2.662117 dimensionless;
  src_123: $src_gatY => gatY; alpha*GatR^src_123_k_1;  // modifiers: GatR
    src_123_k_1 = -0.8993778 dimensionless;
  src_124: $src_nuoJ => nuoJ; alpha*ArcA^src_124_k_1*NarL^src_124_k_2;  // modifiers: ArcA, NarL
    src_124_k_1 = -0.6751531 dimensionless; src_124_k_2 = 1.304408 dimensionless;
  src_125: $src_gltA => gltA; alpha*ArcA^src_125_k_1*CRP^src_125_k_2;  // modifiers: ArcA, CRP
    src_125_k_1 = -1.850521 dimensionless; src_125_k_2 = 2.300873 dimensionless;
  src_126: $src_tnaL => tnaL; alpha*CRP^src_126_k_1;  // modifiers: CRP
    src_126_k_1 = -0.06651787 dimensionless;
  src_127: $src_dapA => dapA; alpha*RpoE^src_127_k_1;  // modifiers: RpoE
    src_127_k_1 = 2.740433 dimensionless;
  src_128: $src_ugpE => ugpE; alpha*CRP^src_128_k_1*PhoB^src_128_k_2;  // modifiers: CRP, PhoB
    src_128_k_1 = 0.6378674 dimensionless; src_128_k_2 = 1.58183 dimensionless;
  src_129: $src_nuoE => nuoE; alpha*ArcA^src_129_k_1*NarL^src_129_k_2;  // modifiers: ArcA, NarL
    src_129_k_1 = -0.6896343 dimensionless; src_129_k_2 = 1.4052 dimensionless;
  src_130: $src_nrfE => nrfE; alpha*NarL^src_130_k_1;  // modifiers: NarL
    src_130_k_1 = -0.01024691 dimensionless;
  src_131: $src_cyoB => cyoB; alpha*ArcA^src_131_k_1;  // modifiers: ArcA
    src_131_k_1 = -0.9911284 dimensionless;
  src_132: $src_rfaF => rfaF; alpha*RpoE^src_132_k_1;  // modifiers: RpoE
    src_132_k_1 = 1.100026 dimensionless;
  src_133: $src_nuoA => nuoA; alpha*ArcA^src_133_k_1*NarL^src_133_k_2;  // modifiers: ArcA, NarL
    src_133_k_1 = -0.4411848 dimensionless; src_133_k_2 = 1.192959 dimensionless;
  src_134: $src_surA => surA; alpha*RpoE^src_134_k_1;  // modifiers: RpoE
    src_134_k_1 = -0.05140306 dimensionless;
  src_135: $src_nuoF => nuoF; alpha*ArcA^src_135_k_1*NarL^src_135_k_2;  // modifiers: ArcA, NarL
    src_135_k_1 = -0.5723939 dimensionless; src_135_k_2 = 1.052837 dimensionless;
  src_136: $src_narY => narY; alpha*RpoS^src_136_k_1;  // modifiers: RpoS
    src_136_k_1 = 2.119743 dimensionless;
  src_137: $src_proP => proP; alpha*CRP^src_137_k_1*RpoS^src_137_k_2;  // modifiers: CRP, RpoS
    src_137_k_1 = 1.625886 dimensionless; src_137_k_2 = -4.079326 dimensionless;
  src_138: $src_adhE => adhE; alpha*NarL^src_138_k_1*RpoS^src_138_k_2;  // modifiers: NarL, RpoS
    src_138_k_1 = 1.242193 dimensionless; src_138_k_2 = -2.181123 dimensionless;
  src_139: $src_narI => narI; alpha*NarL^src_139_k_1;  // modifiers: NarL
    src_139_k_1 = 0.07582871 dimensionless;
  src_140: $src_pykF => pykF; alpha*FruR^src_140_k_1;  // modifiers: FruR
    src_140_k_1 = -0.5947362 dimensionless;
  src_141: $src_rpoD => rpoD; alpha*RpoE^src_141_k_1;  // modifiers: RpoE
    src_141_k_1 = -0.5509491 dimensionless;
  src_142: $src_pstC => pstC; alpha*PhoB^src_142_k_1;  // modifiers: PhoB
    src_142_k_1 = 0.4455029 dimensionless;
  src_143: $src_rpoE => rpoE; alpha*RpoE^src_143_k_1;  // modifiers: RpoE
    src_143_k_1 = -2.279479 dimensionless;
  src_144: $src_arcA => arcA; alpha*ArcA^src_144_k_1;  // modifiers: ArcA
    src_144_k_1 = 0.5304614 dimensionless;
  src_145: $src_cysA => cysA; alpha*CysB^src_145_k_1;  // modifiers: CysB
    src_145_k_1 = 1.084882 dimensionless;
  src_146: $src_aroG => aroG; alpha*TyrR^src_146_k_1;  // modifiers: TyrR
    src_146_k_1 = -2.568492 dimensionless;
  src_147: $src_ugpB => ugpB; alpha*CRP^src_147_k_1*PhoB^src_147_k_2;  // modifiers: CRP, PhoB
    src_147_k_1 = 1.376126 dimensionless; src_147_k_2 = 2.872306 dimensionless;
  src_148: $src_serA => serA; alpha*Lrp^src_148_k_1;  // modifiers: Lrp
    src_148_k_1 = -3.909317 dimensionless;
  src_149: $src_glgP => glgP; alpha*CRP^src_149_k_1;  // modifiers: CRP
    src_149_k_1 = -0.864889 dimensionless;
  src_150: $src_kbl => kbl; alpha*Lrp^src_150_k_1;  // modifiers: Lrp
    src_150_k_1 = 0.5271059 dimensionless;
  src_151: $src_purM => purM; alpha*PurR^src_151_k_1;  // modifiers: PurR
    src_151_k_1 = -1.047334 dimensionless;
  src_152: $src_phoR => phoR; alpha*PhoB^src_152_k_1;  // modifiers: PhoB
    src_152_k_1 = 0.2441183 dimensionless;
  src_153: $src_rseC => rseC; alpha*RpoE^src_153_k_1;  // modifiers: RpoE
    src_153_k_1 = 0.048462 dimensionless;
  src_154: $src_mdoH => mdoH; alpha*RpoE^src_154_k_1;  // modifiers: RpoE
    src_154_k_1 = 0.3505918 dimensionless;
  src_155: $src_cysK => cysK; alpha*CysB^src_155_k_1;  // modifiers: CysB
    src_155_k_1 = 0.9476032 dimensionless;
  src_156: $src_tyrR => tyrR; alpha*TyrR^src_156_k_1;  // modifiers: TyrR
    src_156_k_1 = -0.3135286 dimensionless;
  src_157: $src_cysH => cysH; alpha*CysB^src_157_k_1;  // modifiers: CysB
    src_157_k_1 = 1.61808 dimensionless;
  src_158: $src_aroP => aroP; alpha*TyrR^src_158_k_1;  // modifiers: TyrR
    src_158_k_1 = -1.451509 dimensionless;
  src_159: $src_glgS => glgS; alpha*CRP^src_159_k_1;  // modifiers: CRP
    src_159_k_1 = 1.158821 dimensionless;
  src_160: $src_purA => purA; alpha*RpoE^src_160_k_1;  // modifiers: RpoE
    src_160_k_1 = 3.85834 dimensionless;
  src_161: $src_purK => purK; alpha*PurR^src_161_k_1;  // modifiers: PurR
    src_161_k_1 = -0.5657463 dimensionless;
  src_162: $src_leuC => leuC; alpha*LeuO^src_162_k_1;  // modifiers: LeuO
    src_162_k_1 = 0.9601441 dimensionless;
  src_163: $src_leuA => leuA; alpha*LeuO^src_163_k_1;  // modifiers: LeuO
    src_163_k_1 = 1.101841 dimensionless;
  src_164: $src_leuB => leuB; alpha*LeuO^src_164_k_1;  // modifiers: LeuO
    src_164_k_1 = 0.9378548 dimensionless;
  src_165: $src_trpA => trpA; alpha*TrpR^src_165_k_1;  // modifiers: TrpR
    src_165_k_1 = -2.323039 dimensionless;
  src_166: $src_trpC => trpC; alpha*TrpR^src_166_k_1;  // modifiers: TrpR
    src_166_k_1 = -2.294457 dimensionless;
  src_167: $src_aroF => aroF; alpha*TyrR^src_167_k_1;  // modifiers: TyrR
    src_167_k_1 = -0.7493862 dimensionless;
  src_168: $src_tyrA => tyrA; alpha*TyrR^src_168_k_1;  // modifiers: TyrR
    src_168_k_1 = -1.396729 dimensionless;
  src_169: $src_uspA => uspA; alpha*FadR^src_169_k_1;  // modifiers: FadR
    src_169_k_1 = -1.524331 dimensionless;
  src_170: $src_fabA => fabA; alpha*FadR^src_170_k_1;  // modifiers: FadR
    src_170_k_1 = 1.328556 dimensionless;
  src_171: $src_iclR => iclR; alpha*FadR^src_171_k_1;  // modifiers: FadR
    src_171_k_1 = -0.9204291 dimensionless;
  src_172: $src_epd => epd; alpha*CRP^src_172_k_1;  // modifiers: CRP
    src_172_k_1 = -0.3271335 dimensionless;
  src_173: $src_aidB => aidB; alpha*Lrp^src_173_k_1*RpoS^src_173_k_2;  // modifiers: Lrp, RpoS
    src_173_k_1 = 0.7361461 dimensionless; src_173_k_2 = 0.05300065 dimensionless;
  src_174: $src_csgD => csgD; alpha*RpoS^src_174_k_1;  // modifiers: RpoS
    src_174_k_1 = -0.3172146 dimensionless;
  src_175: $src_csgE => csgE; alpha*RpoS^src_175_k_1;  // modifiers: RpoS
    src_175_k_1 = -2.19493 dimensionless;
  src_176: $src_csgF => csgF; alpha*RpoS^src_176_k_1;  // modifiers: RpoS
    src_176_k_1 = -1.157727 dimensionless;
  src_177: $src_csiE => csiE; alpha*CRP^src_177_k_1*RpoS^src_177_k_2;  // modifiers: CRP, RpoS
    src_177_k_1 = 0.8331226 dimensionless; src_177_k_2 = 3.224899 dimensionless;
  src_178: $src_ftsZ => ftsZ; alpha*RpoS^src_178_k_1;  // modifiers: RpoS
    src_178_k_1 = -0.7187931 dimensionless;
  src_179: $src_galE => galE; alpha*CRP^src_179_k_1*RpoS^src_179_k_2;  // modifiers: CRP, RpoS
    src_179_k_1 = -0.6876145 dimensionless; src_179_k_2 = 2.448369 dimensionless;
  src_180: $src_galK => galK; alpha*CRP^src_180_k_1*RpoS^src_180_k_2;  // modifiers: CRP, RpoS
    src_180_k_1 = -1.015857 dimensionless; src_180_k_2 = 3.23763 dimensionless;
  src_181: $src_galT => galT; alpha*CRP^src_181_k_1*RpoS^src_181_k_2;  // modifiers: CRP, RpoS
    src_181_k_1 = -0.6418729 dimensionless; src_181_k_2 = 2.407279 dimensionless;
  src_182: $src_glgA => glgA; alpha*RpoS^src_182_k_1;  // modifiers: RpoS
    src_182_k_1 = -1.523871 dimensionless;
  src_183: $src_glpD => glpD; alpha*RpoS^src_183_k_1;  // modifiers: RpoS
    src_183_k_1 = 1.7641 dimensionless;
  src_184: $src_gor => gor; alpha*RpoS^src_184_k_1;  // modifiers: RpoS
    src_184_k_1 = 0.03216602 dimensionless;
  src_185: $src_hdeA => hdeA; alpha*RpoS^src_185_k_1;  // modifiers: RpoS
    src_185_k_1 = 3.717504 dimensionless;
  src_186: $src_hdeB => hdeB; alpha*RpoS^src_186_k_1;  // modifiers: RpoS
    src_186_k_1 = 2.885388 dimensionless;
  src_187: $src_ldcC => ldcC; alpha*RpoS^src_187_k_1;  // modifiers: RpoS
    src_187_k_1 = 0.7295592 dimensionless;
  src_188: $src_mutH => mutH; alpha*RpoS^src_188_k_1;  // modifiers: RpoS
    src_188_k_1 = 0.386241 dimensionless;
  src_189: $src_osmE => osmE; alpha*RpoS^src_189_k_1;  // modifiers: RpoS
    src_189_k_1 = 0.840972 dimensionless;
  src_190: $src_poxB => poxB; alpha*RpoS^src_190_k_1;  // modifiers: RpoS
    src_190_k_1 = 1.043288 dimensionless;
  src_191: $src_pspA => pspA; alpha*RpoS^src_191_k_1;  // modifiers: RpoS
    src_191_k_1 = 1.691104 dimensionless;
  src_192: $src_rob => rob; alpha*RpoS^src_192_k_1;  // modifiers: RpoS
    src_192_k_1 = 1.06275 dimensionless;
  src_193: $src_topA => topA; alpha*RpoS^src_193_k_1;  // modifiers: RpoS
    src_193_k_1 = -0.9213868 dimensionless;
  src_194: $src_wrbA => wrbA; alpha*RpoS^src_194_k_1;  // modifiers: RpoS
    src_194_k_1 = 0.5837189 dimensionless;
  src_195: $src_xthA => xthA; alpha*RpoS^src_195_k_1;  // modifiers: RpoS
    src_195_k_1 = 0.162557 dimensionless;
  src_196: $src_yciG => yciG; alpha*RpoS^src_196_k_1;  // modifiers: RpoS
    src_196_k_1 = 1.858302 dimensionless;
  src_197: $src_ppsA => ppsA; alpha*FruR^src_197_k_1;  // modifiers: FruR
    src_197_k_1 = 1.374703 dimensionless;

  // Unit definitions:
  unit degcnst = 1 / (0.01666667 second);
  unit mrna = 1 / (1e-15 litre);
  unit tfa2mrna = 1 / (0.01666667 second * 1e-15 litre);
  unit time = 60 second;
end
