// SBML level 2 version 1

model invParameterUnitRef()
  // Invalid Parameter Unit Reference
  // A parameter references a unit which is not defined.

  // Compartments:
  compartment global = 1 v;

  // Species:
  species A in global = 1;  // substance in s
  species B in global = 1;  // substance in s
  species C in global = 1;  // substance in s

  // Parameters:
  p1 = 1 c;
  p2 = 1 foo;

  // Reactions:
  r1: A -> B + C; kf*A*global - kr*B*global*C*global;
    kf = 1 bar; kr = 1 rate;

  // Unit definitions:
  unit c = mole / litre;
  unit s = 1e-3 mole;
  unit v = 1e-3 litre;
  unit rate = 0.1 mole * 0.1 second;
end
