// SBML level 2 version 1

function f0(x, y)
  x + y;
end

model ruleLabelRef()
  // Label Reference in Rule Definitions
  // The ci elements in any of the rule elements may only refer to lexically preceding rule elements labels or global identifiers associated with element types allowed to vary.

  // Compartments:
  compartment global;
  compartment c0;

  // Species:
  species A in global;
  species B in global;
  species C in global;
  species D in global;
  species E in global;

  // Parameters:
  ep0 = ;
  p0 = ;

  // Reactions:
  r0: A + B -> C; p0*global*u0*e0*f0(D, E)*(kf*A*B - kr*C);  // modifiers: D

  // Events:
  e0: at (): ep0 = ;

  // Unit definitions:
  unit u0 = mole / litre;
end
