// SBML level 2 version 1

function f0(x, y)
  x + y;
end

model ruleLabelRef()
  // Label Reference in Rule Definitions
  // The ci elements in any of the rule elements may only refer to lexically preceding rule elements labels or global identifiers associated with element types allowed to vary.

  // Compartments:
  compartment global;
  compartment c0;

  // Species:
  species A in global;
  species B in global;
  species C in global;
  species D in global;

  // Parameters:
  ep0 = ;

  // Assignment rules:
  p0 := 0.1*r0;
  D := f0(B, C) + foo + u0;

  // Rate rules:
  p0' = rp0*time;
  D' = e0*c0*time;

  // Algebraic rules:
  0 = A + B - C;

  // Reactions:
  r0: A + B -> C; ;  // modifiers: D

  // Events:
  e0: at (): ep0 = ;

  // Unit definitions:
  unit u0 = mole / litre;
end
