// SBML level 2 version 1

function BB_218(A1, A2, A3, A4)
  A2 - A1 + A3*A2 + A4*A1;
end

function GK_219(A1, A2, A3, A4)
  2*A4*A1/(BB_218(A1, A2, A3, A4) + sqrt(BB_218(A1, A2, A3, A4)^2 - 4*(A2 - A1)*A4*A1));
end

function MichaelisMenten_220(M1, J1, k1, S1)
  k1*S1*M1/(J1 + S1);
end
MichaelisMenten_220 is "Michaelis-Menten";

function Mass_Action_2_221(k1, S1, S2)
  k1*S1*S2;
end

function Mass_Action_1_222(k1, S1)
  k1*S1;
end

function Mass_Action_0_223(k1)
  k1;
end

model New_Mechanism()

  // Compartments:
  compartment cell_0 = 1;

  // Species:
  species BCK2_1 in cell_0;
  species BUB2_2 in cell_0 = 0.2/cell_0;
  species BUD_3 in cell_0 = 0.008473/cell_0;
  species C2_4 in cell_0 = 0.238404/cell_0;
  species C2P_5 in cell_0 = 0.024034/cell_0;
  species C5_6 in cell_0 = 0.070081/cell_0;
  species C5P_7 in cell_0 = 0.006878/cell_0;
  species CDC14_8 in cell_0 = 0.468344/cell_0;
  species CDC14T_9 in cell_0;
  species CDC15_10 in cell_0 = 0.656533/cell_0;
  species CDC15i_11 in cell_0 = 0.343466/cell_0;
  species CDC20_12 in cell_0 = 0.444296/cell_0;
  species CDC20i_13 in cell_0 = 1.472044/cell_0;
  species CDC6_14 in cell_0 = 0.10758/cell_0;
  species CDC6P_15 in cell_0 = 0.015486/cell_0;
  species CDC6T_16 in cell_0;
  species CDH1_17 in cell_0 = 0.930499/cell_0;
  species CDH1i_18 in cell_0 = 0.0695/cell_0;
  species CKIT_19 in cell_0;
  species CLB2_20 in cell_0 = 0.1469227/cell_0;
  species CLB2T_21 in cell_0;
  species CLB5_22 in cell_0 = 0.0518014/cell_0;
  species CLB5T_23 in cell_0;
  species CLN2_24 in cell_0 = 0.0652511/cell_0;
  species CLN3_25 in cell_0;
  species D_26 in cell_0;
  species ESP1_27 in cell_0 = 0.301313/cell_0;
  species F_28 in cell_0;
  species F2_29 in cell_0 = 0.236058/cell_0;
  species F2P_30 in cell_0 = 0.0273938/cell_0;
  species F5_31 in cell_0 = 7.24e-5/cell_0;
  species F5P_32 in cell_0 = 7.91e-5/cell_0;
  species IE_33 in cell_0 = 0.8985/cell_0;
  species IEP_34 in cell_0 = 0.1015/cell_0;
  species LTE1_35 in cell_0 = 0.1/cell_0;
  species MAD2_36 in cell_0 = 0.01/cell_0;
  species MASS_37 in cell_0 = 1.206019/cell_0;
  species MCM1_38 in cell_0;
  species mu_39 in cell_0;
  species NET1_40 in cell_0 = 0.018645/cell_0;
  species NET1P_41 in cell_0 = 0.970271/cell_0;
  species NET1T_42 in cell_0;
  species ORI_43 in cell_0 = 9.09e-4/cell_0;
  species PDS1_44 in cell_0 = 0.025612/cell_0;
  species PE_45 in cell_0 = 0.7/cell_0;
  species PPX_46 in cell_0 = 0.123179/cell_0;
  species RENT_47 in cell_0 = 1.04954/cell_0;
  species RENTP_48 in cell_0 = 0.6/cell_0;
  species SBF_49 in cell_0;
  species SIC1_50 in cell_0 = 0.0228776/cell_0;
  species SIC1P_51 in cell_0 = 0.00641/cell_0;
  species SIC1T_52 in cell_0;
  species SPN_53 in cell_0 = 0.03/cell_0;
  species SWI5_54 in cell_0 = 0.95/cell_0;
  species SWI5P_55 in cell_0 = 0.02/cell_0;
  species TEM1GDP_56 in cell_0 = 0.1/cell_0;
  species TEM1GTP_57 in cell_0 = 0.9/cell_0;
  species Vacdh_58 in cell_0;
  species Vaiep_59 in cell_0;
  species Vasbf_60 in cell_0;
  species Vd2c1_61 in cell_0;
  species Vd2f6_62 in cell_0;
  species Vdb2_63 in cell_0;
  species Vdb5_64 in cell_0;
  species Vdpds_65 in cell_0;
  species Vdppx_66 in cell_0;
  species Vicdh_67 in cell_0;
  species Visbf_68 in cell_0;
  species Vkpc1_69 in cell_0;
  species Vkpf6_70 in cell_0;
  species Vkpnet_71 in cell_0;
  species Vppc1_72 in cell_0;
  species Vppf6_73 in cell_0;
  species Vppnet_74 in cell_0;

  // Parameters:
  b0_75 = 0.054;
  bub2h_76 = 1;
  bub2l_77 = 0.2;
  C0_78 = 0.4;
  CDC15T_79 = 1;
  Dn3_80 = 1;
  ebudb5_81 = 1;
  ebudn2_82 = 0.25;
  ebudn3_83 = 0.05;
  ec1b2_84 = 0.45;
  ec1b5_85 = 0.1;
  ec1k2_86 = 0.03;
  ec1n2_87 = 0.06;
  ec1n3_88 = 0.3;
  ef6b2_89 = 0.55;
  ef6b5_90 = 0.1;
  ef6k2_91 = 0.03;
  ef6n2_92 = 0.06;
  ef6n3_93 = 0.3;
  eicdhb2_94 = 1.2;
  eicdhb5_95 = 8;
  eicdhn2_96 = 0.4;
  eicdhn3_97 = 0.25;
  eorib2_98 = 0.45;
  eorib5_99 = 0.9;
  esbfb5_100 = 2;
  esbfn2_101 = 2;
  esbfn3_102 = 10;
  ESP1T_103 = 1;
  IET_104 = 1;
  J20ppx_105 = 0.15;
  Jacdh_106 = 0.03;
  Jaiep_107 = 0.1;
  Jamcm_108 = 0.1;
  Jasbf_109 = 0.01;
  Jatem_110 = 0.1;
  Jd2c1_111 = 0.05;
  Jd2f6_112 = 0.05;
  Jicdh_113 = 0.03;
  Jiiep_114 = 0.1;
  Jimcm_115 = 0.1;
  Jisbf_116 = 0.01;
  Jitem_117 = 0.1;
  Jn3_118 = 6;
  Jpds_119 = 0.04;
  Jspn_120 = 0.14;
  ka_121 = 0.002; ka_121 is "ka15'";
  ka_122 = 1; ka_122 is "ka15''";
  ka15p_123 = 0.001;
  ka_124 = 0.05; ka_124 is "ka20'";
  ka_125 = 0.2; ka_125 is "ka20''";
  kacdh_126 = 0.01; kacdh_126 is "kacdh'";
  kacdh_127 = 0.8; kacdh_127 is "kacdh''";
  kaiep_128 = 0.1;
  kamcm_129 = 1;
  kasb2_130 = 50;
  kasb5_131 = 50;
  kasbf_132 = 0.38;
  kasesp_133 = 50;
  kasf2_134 = 15;
  kasf5_135 = 0.01;
  kasrent_136 = 200;
  kasrentp_137 = 1;
  kaswi_138 = 2;
  kd14_139 = 0.1;
  kd1c1_140 = 0.01;
  kd1f6_141 = 0.01;
  kdpds_142 = 0.01; kdpds_142 is "kd1pds'";
  kd20_143 = 0.3;
  kd2c1_144 = 1;
  kd2f6_145 = 1;
  kdpds_146 = 0.2; kdpds_146 is "kd2pds''";
  kd3c1_147 = 1;
  kd3f6_148 = 1;
  kdpds_149 = 0.04; kdpds_149 is "kd3pds''";
  kdb_150 = 0.003; kdb_150 is "kdb2'";
  kdb_151 = 0.4; kdb_151 is "kdb2''";
  kdb2p_152 = 0.15;
  kdb_153 = 0.01; kdb_153 is "kdb5'";
  kdb_154 = 0.16; kdb_154 is "kdb5''";
  kdbud_155 = 0.06;
  kdcdh_156 = 0.01;
  kdib2_157 = 0.05;
  kdib5_158 = 0.06;
  kdiesp_159 = 0.5;
  kdif2_160 = 0.5;
  kdif5_161 = 0.01;
  kdirent_162 = 1;
  kdirentp_163 = 2;
  kdn2_164 = 0.12;
  kdnet_165 = 0.03;
  kdori_166 = 0.06;
  kdppx_167 = 0.17; kdppx_167 is "kdppx'";
  kdppx_168 = 2; kdppx_168 is "kdppx''";
  kdspn_169 = 0.06;
  kdswi_170 = 0.08;
  KEZ_171 = 0.3;
  KEZ2_172 = 0.2;
  ki15_173 = 0.5;
  kicdh_174 = 0.001; kicdh_174 is "kicdh'";
  kicdh_175 = 0.08; kicdh_175 is "kicdh''";
  kiiep_176 = 0.15;
  kimcm_177 = 0.15;
  kisbf_178 = 0.6; kisbf_178 is "kisbf'";
  kisbf_179 = 8; kisbf_179 is "kisbf''";
  kiswi_180 = 0.05;
  kkpnet_181 = 0.01; kkpnet_181 is "kkpnet'";
  kkpnet_182 = 0.6; kkpnet_182 is "kkpnet''";
  kppc1_183 = 4;
  kppf6_184 = 4;
  kppnet_185 = 0.05; kppnet_185 is "kppnet'";
  kppnet_186 = 3; kppnet_186 is "kppnet''";
  ks14_187 = 0.2;
  kspds_188 = 0.03; kspds_188 is "ks1pds''";
  ks_189 = 0.006; ks_189 is "ks20'";
  ks_190 = 0.6; ks_190 is "ks20''";
  kspds_191 = 0.055; kspds_191 is "ks2pds''";
  ksb_192 = 0.001; ksb_192 is "ksb2'";
  ksb_193 = 0.04; ksb_193 is "ksb2''";
  ksb_194 = 8e-4; ksb_194 is "ksb5'";
  ksb_195 = 0.005; ksb_195 is "ksb5''";
  ksbud_196 = 0.2;
  ksc_197 = 0.012; ksc_197 is "ksc1'";
  ksc_198 = 0.12; ksc_198 is "ksc1''";
  kscdh_199 = 0.01;
  ksf_200 = 0.024; ksf_200 is "ksf6'";
  ksf_201 = 0.12; ksf_201 is "ksf6''";
  ksf_202 = 0.004; ksf_202 is "ksf6'''";
  ksn_203 = 0; ksn_203 is "ksn2'";
  ksn_204 = 0.15; ksn_204 is "ksn2''";
  ksnet_205 = 0.084;
  ksori_206 = 2;
  kspds_207 = 0; kspds_207 is "kspds'";
  ksppx_208 = 0.1;
  ksspn_209 = 0.1;
  ksswi_210 = 0.005; ksswi_210 is "ksswi'";
  ksswi_211 = 0.08; ksswi_211 is "ksswi''";
  lte1h_212 = 1;
  lte1l_213 = 0.1;
  mad2h_214 = 8;
  mad2l_215 = 0.01;
  mdt_216 = 90;
  TEM1T_217 = 1;

  // Assignment rules:
  BCK2_1 := b0_75*MASS_37;
  Visbf_68 := kisbf_178 + kisbf_179*CLB2_20;
  CLN3_25 := C0_78*Dn3_80*MASS_37/(Jn3_118 + Dn3_80*MASS_37);
  Vppc1_72 := kppc1_183*CDC14_8;
  Vppf6_73 := kppf6_184*CDC14_8;
  Vaiep_59 := kaiep_128*CLB2_20;
  Vacdh_58 := kacdh_126 + kacdh_127*CDC14_8;
  Vicdh_67 := kicdh_174 + kicdh_175*(eicdhn3_97*CLN3_25 + eicdhn2_96*CLN2_24 + eicdhb5_95*CLB5_22 + eicdhb2_94*CLB2_20);
  Vkpnet_71 := (kkpnet_181 + kkpnet_182*CDC15_10)*MASS_37;
  Vppnet_74 := kppnet_185 + kppnet_186*PPX_46;
  Vasbf_60 := kasbf_132*(esbfn2_101*CLN2_24 + esbfn3_102*(CLN3_25 + BCK2_1) + esbfb5_100*CLB5_22);
  SBF_49 := GK_219(Vasbf_60, Visbf_68, Jasbf_109, Jisbf_116);
  MCM1_38 := GK_219(kamcm_129*CLB2_20, kimcm_177, Jamcm_108, Jimcm_115);
  mu_39 := ln(2)/mdt_216;
  D_26 := 1.026/mu_39 - 32;
  F_28 := exp(-mu_39*D_26);
  Vd2c1_61 := kd2c1_144*(ec1n3_88*CLN3_25 + ec1k2_86*BCK2_1 + ec1n2_87*CLN2_24 + ec1b5_85*CLB5_22 + ec1b2_84*CLB2_20);
  Vd2f6_62 := kd2f6_145*(ef6n3_93*CLN3_25 + ef6k2_91*BCK2_1 + ef6n2_92*CLN2_24 + ef6b5_90*CLB5_22 + ef6b2_89*CLB2_20);
  Vkpc1_69 := kd1c1_140 + Vd2c1_61/(Jd2c1_111 + SIC1_50 + C2_4 + C5_6 + SIC1P_51 + C2P_5 + C5P_7);
  Vkpf6_70 := kd1f6_141 + Vd2f6_62/(Jd2f6_112 + CDC6_14 + F2_29 + F5_31 + CDC6P_15 + F2P_30 + F5P_32);
  Vdb2_63 := kdb_150 + kdb_151*CDH1_17 + kdb2p_152*CDC20_12;
  Vdb5_64 := kdb_153 + kdb_154*CDC20_12;
  Vdpds_65 := kdpds_142 + kdpds_146*CDC20_12 + kdpds_149*CDH1_17;
  Vdppx_66 := kdppx_167 + kdppx_168*(J20ppx_105 + CDC20_12)*Jpds_119/(Jpds_119 + PDS1_44);
  CLB2T_21 := CLB2_20 + C2_4 + C2P_5 + F2_29 + F2P_30;
  CLB5T_23 := CLB5_22 + C5_6 + C5P_7 + F5_31 + F5P_32;
  CDC14T_9 := CDC14_8 + RENT_47 + RENTP_48;
  NET1T_42 := NET1_40 + NET1P_41 + RENT_47 + RENTP_48;
  SIC1T_52 := SIC1_50 + C2_4 + C5_6 + SIC1P_51 + C2P_5 + C5P_7;
  CDC6T_16 := CDC6_14 + F2_29 + F5_31 + CDC6P_15 + F2P_30 + F5P_32;
  CKIT_19 := SIC1T_52 + CDC6T_16;

  // Algebraic rules:
  0 = CDC15_10 + CDC15i_11 - CDC15T_79;
  0 = IE_33 + IEP_34 - IET_104;
  0 = ESP1_27 + PE_45 - ESP1T_103;
  0 = TEM1GDP_56 + TEM1GTP_57 - TEM1T_217;

  // Reactions:
  Growth_225: => MASS_37; Mass_Action_0_223(mu_39*MASS_37);
  SynthesisofCLN_226: => CLN2_24; Mass_Action_0_223((ksn_203 + ksn_204*SBF_49)*MASS_37); SynthesisofCLN_226 is "Synthesis of CLN2";
  DegradationofCLN_227: CLN2_24 => ; Mass_Action_1_222(kdn2_164, CLN2_24); DegradationofCLN_227 is "Degradation of CLN2";
  SynthesisofCLB_228: => CLB2_20; Mass_Action_0_223((ksb_192 + ksb_193*MCM1_38)*MASS_37); SynthesisofCLB_228 is "Synthesis of CLB2";
  DegradationofCLB_229: CLB2_20 => ; Mass_Action_1_222(Vdb2_63, CLB2_20); DegradationofCLB_229 is "Degradation of CLB2";
  SynthesisofCLB_230: => CLB5_22; Mass_Action_0_223((ksb_194 + ksb_195*SBF_49)*MASS_37); SynthesisofCLB_230 is "Synthesis of CLB5";
  DegradationofCLB_231: CLB5_22 => ; Mass_Action_1_222(Vdb5_64, CLB5_22); DegradationofCLB_231 is "Degradation of CLB5";
  SynthesisofSIC_232: => SIC1_50; Mass_Action_0_223(ksc_197 + ksc_198*SWI5_54); SynthesisofSIC_232 is "Synthesis of SIC1";
  PhosphorylationofSIC_233: SIC1_50 => SIC1P_51; Mass_Action_1_222(Vkpc1_69, SIC1_50); PhosphorylationofSIC_233 is "Phosphorylation of SIC1";
  DephosphorylationofSIC_234: SIC1P_51 => SIC1_50; Mass_Action_1_222(Vppc1_72, SIC1P_51); DephosphorylationofSIC_234 is "Dephosphorylation of SIC1";
  FastDegradationofSICP_235: SIC1P_51 => ; Mass_Action_1_222(kd3c1_147, SIC1P_51); FastDegradationofSICP_235 is "Fast Degradation of SIC1P";
  AssocofCLBandSIC_236: CLB2_20 + SIC1_50 => C2_4; Mass_Action_2_221(kasb2_130, CLB2_20, SIC1_50); AssocofCLBandSIC_236 is "Assoc. of CLB2 and SIC1";
  DissocofCLBSICcomplex_237: C2_4 => CLB2_20 + SIC1_50; Mass_Action_1_222(kdib2_157, C2_4); DissocofCLBSICcomplex_237 is "Dissoc. of CLB2/SIC1 complex";
  AssocofCLBandSIC_238: CLB5_22 + SIC1_50 => C5_6; Mass_Action_2_221(kasb5_131, CLB5_22, SIC1_50); AssocofCLBandSIC_238 is "Assoc. of CLB5 and SIC1";
  DissocofCLBSIC_239: C5_6 => CLB5_22 + SIC1_50; Mass_Action_1_222(kdib5_158, C5_6); DissocofCLBSIC_239 is "Dissoc. of CLB5/SIC1";
  PhosphorylationofC_240: C2_4 => C2P_5; Mass_Action_1_222(Vkpc1_69, C2_4); PhosphorylationofC_240 is "Phosphorylation of C2";
  DephosphorylationofCP_241: C2P_5 => C2_4; Mass_Action_1_222(Vppc1_72, C2P_5); DephosphorylationofCP_241 is "Dephosphorylation of C2P";
  _242: C5_6 => C5P_7; Mass_Action_1_222(Vkpc1_69, C5_6);
  _243: C5P_7 => C5_6; Mass_Action_1_222(Vppc1_72, C5P_7);
  DegradationofCLBinC_244: C2_4 => SIC1_50; Mass_Action_1_222(Vdb2_63, C2_4); DegradationofCLBinC_244 is "Degradation of CLB2 in C2";
  _245: C5_6 => SIC1_50; Mass_Action_1_222(Vdb5_64, C5_6);
  DegradationofSICinCP_246: C2P_5 => CLB2_20; Mass_Action_1_222(kd3c1_147, C2P_5); DegradationofSICinCP_246 is "Degradation of SIC1 in C2P";
  _247: C5P_7 => CLB5_22; Mass_Action_1_222(kd3c1_147, C5P_7);
  DegradationofCLBinCP_248: C2P_5 => SIC1P_51; Mass_Action_1_222(Vdb2_63, C2P_5); DegradationofCLBinCP_248 is "Degradation of CLB2 in C2P";
  _249: C5P_7 => SIC1P_51; Mass_Action_1_222(Vdb5_64, C5P_7);
  CDCanotherCKIlikeSIC_250: => CDC6_14; Mass_Action_0_223(ksf_200 + ksf_201*SWI5_54 + ksf_202*SBF_49); CDCanotherCKIlikeSIC_250 is "CDC6, another CKI like SIC1";
  _251: CDC6_14 => CDC6P_15; Mass_Action_1_222(Vkpf6_70, CDC6_14);
  _252: CDC6P_15 => CDC6_14; Mass_Action_1_222(Vppf6_73, CDC6P_15);
  _253: CDC6P_15 => ; Mass_Action_1_222(kd3f6_148, CDC6P_15);
  _254: CLB2_20 + CDC6_14 => F2_29; Mass_Action_2_221(kasf2_134, CLB2_20, CDC6_14);
  _255: F2_29 => CLB2_20 + CDC6_14; Mass_Action_1_222(kdif2_160, F2_29);
  _256: CLB5_22 + CDC6_14 => F5_31; Mass_Action_2_221(kasf5_135, CLB5_22, CDC6_14);
  _257: F5_31 => CLB5_22 + CDC6_14; Mass_Action_1_222(kdif5_161, F5_31);
  _258: F2_29 => F2P_30; Mass_Action_1_222(Vkpf6_70, F2_29);
  _259: F2P_30 => F2_29; Mass_Action_1_222(Vppf6_73, F2P_30);
  _260: F5_31 => F5P_32; Mass_Action_1_222(Vkpf6_70, F5_31);
  _261: F5P_32 => F5_31; Mass_Action_1_222(Vppf6_73, F5P_32);
  _262: F2_29 => CDC6_14; Mass_Action_1_222(Vdb2_63, F2_29);
  _263: F5_31 => CDC6_14; Mass_Action_1_222(Vdb5_64, F5_31);
  _264: F2P_30 => CLB2_20; Mass_Action_1_222(kd3f6_148, F2P_30);
  _265: F5P_32 => CLB5_22; Mass_Action_1_222(kd3f6_148, F5P_32);
  _266: F2P_30 => CDC6P_15; Mass_Action_1_222(Vdb2_63, F2P_30);
  _267: F5P_32 => CDC6P_15; Mass_Action_1_222(Vdb5_64, F5P_32);
  SynthesisofSWI_268: => SWI5_54; Mass_Action_0_223(ksswi_210 + ksswi_211*MCM1_38); SynthesisofSWI_268 is "Synthesis of SWI5";
  DegradationofSWI_269: SWI5_54 => ; Mass_Action_1_222(kdswi_170, SWI5_54); DegradationofSWI_269 is "Degradation of SWI5";
  DegradationofSWIP_270: SWI5P_55 => ; Mass_Action_1_222(kdswi_170, SWI5P_55); DegradationofSWIP_270 is "Degradation of SWI5P";
  ActivationofSWI_271: SWI5P_55 => SWI5_54; Mass_Action_1_222(kaswi_138*CDC14_8, SWI5P_55); ActivationofSWI_271 is "Activation of SWI5";
  InactivationofSWI_272: SWI5_54 => SWI5P_55; Mass_Action_1_222(kiswi_180*CLB2_20, SWI5_54); InactivationofSWI_272 is "Inactivation of SWI5";
  ActivationofIEP_273: IE_33 => IEP_34; MichaelisMenten_220(Vaiep_59, Jaiep_107, 1, IE_33); ActivationofIEP_273 is "Activation of IEP";
  Inactivation_274: IEP_34 => IE_33; MichaelisMenten_220(1, Jiiep_114, kiiep_176, IEP_34);
  SynthesisofinactiveCDC_275: => CDC20i_13; Mass_Action_0_223(ks_189 + ks_190*MCM1_38); SynthesisofinactiveCDC_275 is "Synthesis of inactive CDC20";
  DegradationofinactiveCDC_276: CDC20i_13 => ; Mass_Action_1_222(kd20_143, CDC20i_13); DegradationofinactiveCDC_276 is "Degradation of inactiveCDC20";
  DegradationofactiveCDC_277: CDC20_12 => ; Mass_Action_1_222(kd20_143, CDC20_12); DegradationofactiveCDC_277 is "Degradation of active CDC20";
  ActivationofCDC_278: CDC20i_13 => CDC20_12; Mass_Action_1_222(ka_124 + ka_125*IEP_34, CDC20i_13); ActivationofCDC_278 is "Activation of CDC20";
  Inactivation_274: CDC20_12 => CDC20i_13; Mass_Action_1_222(MAD2_36, CDC20_12);
  _279: => CDH1_17; Mass_Action_0_223(kscdh_199);
  _280: CDH1_17 => ; Mass_Action_1_222(kdcdh_156, CDH1_17);
  _281: CDH1i_18 => ; Mass_Action_1_222(kdcdh_156, CDH1i_18);
  Activation_282: CDH1i_18 => CDH1_17; MichaelisMenten_220(Vacdh_58, Jacdh_106, 1, CDH1i_18);
  Inactivation_274: CDH1_17 => CDH1i_18; MichaelisMenten_220(Vicdh_67, Jicdh_113, 1, CDH1_17);
  _283: => CDC14_8; Mass_Action_0_223(ks14_187);
  _284: CDC14_8 => ; Mass_Action_1_222(kd14_139, CDC14_8);
  AssocwithNETtoformRENT_285: CDC14_8 + NET1_40 => RENT_47; Mass_Action_2_221(kasrent_136, CDC14_8, NET1_40); AssocwithNETtoformRENT_285 is "Assoc. with NET1 to form RENT";
  DissocfromRENT_286: RENT_47 => NET1_40 + CDC14_8; Mass_Action_1_222(kdirent_162, RENT_47); DissocfromRENT_286 is "Dissoc. from RENT";
  AssocwithNETPtoformRENTP_287: CDC14_8 + NET1P_41 => RENTP_48; Mass_Action_2_221(kasrentp_137, CDC14_8, NET1P_41); AssocwithNETPtoformRENTP_287 is "Assoc with NET1P to form RENTP";
  DissocfromRENP_288: RENTP_48 => CDC14_8 + NET1P_41; Mass_Action_1_222(kdirentp_163, RENTP_48); DissocfromRENP_288 is "Dissoc. from RENP";
  _289: => NET1_40; Mass_Action_0_223(ksnet_205);
  _290: NET1_40 => ; Mass_Action_1_222(kdnet_165, NET1_40);
  _291: NET1P_41 => ; Mass_Action_1_222(kdnet_165, NET1P_41);
  NETphosphorylation_292: NET1_40 => NET1P_41; Mass_Action_1_222(Vkpnet_71, NET1_40); NETphosphorylation_292 is "NET1 phosphorylation";
  dephosphorylation_293: NET1P_41 => NET1_40; Mass_Action_1_222(Vppnet_74, NET1P_41);
  RENTphosphorylation_294: RENT_47 => RENTP_48; Mass_Action_1_222(Vkpnet_71, RENT_47); RENTphosphorylation_294 is "RENT phosphorylation";
  dephosphorylation_293: RENTP_48 => RENT_47; Mass_Action_1_222(Vppnet_74, RENTP_48);
  DegradationofNETinRENT_295: RENT_47 => CDC14_8; Mass_Action_1_222(kdnet_165, RENT_47); DegradationofNETinRENT_295 is "Degradation of NET1 in RENT";
  DegradationofNETPinRENTP_296: RENTP_48 => CDC14_8; Mass_Action_1_222(kdnet_165, RENTP_48); DegradationofNETPinRENTP_296 is "Degradation of NET1P in RENTP";
  DegradationofCDCinRENT_297: RENT_47 => NET1_40; Mass_Action_1_222(kd14_139, RENT_47); DegradationofCDCinRENT_297 is "Degradation of CDC14 in RENT";
  DegradationofCDCinRENTP_298: RENTP_48 => NET1P_41; Mass_Action_1_222(kd14_139, RENTP_48); DegradationofCDCinRENTP_298 is "Degradation of CDC14 in RENTP";
  TEMactivation_299: TEM1GDP_56 => TEM1GTP_57; MichaelisMenten_220(LTE1_35, Jatem_110, 1, TEM1GDP_56); TEMactivation_299 is "TEM1 activation";
  inactivation_300: TEM1GTP_57 => TEM1GDP_56; MichaelisMenten_220(BUB2_2, Jitem_117, 1, TEM1GTP_57);
  CDCactivation_301: CDC15i_11 => CDC15_10; Mass_Action_1_222(ka_121*TEM1GDP_56 + ka_122*TEM1GTP_57 + ka15p_123*CDC14_8, CDC15i_11); CDCactivation_301 is "CDC15 activation";
  inactivation_300: CDC15_10 => CDC15i_11; Mass_Action_1_222(ki15_173, CDC15_10);
  PPXsynthesis_302: => PPX_46; Mass_Action_0_223(ksppx_208); PPXsynthesis_302 is "PPX synthesis";
  degradation_303: PPX_46 => ; Mass_Action_1_222(Vdppx_66, PPX_46);
  PDSsynthesis_304: => PDS1_44; Mass_Action_0_223(kspds_207 + kspds_188*SBF_49 + kspds_191*MCM1_38); PDSsynthesis_304 is "PDS1 synthesis";
  degradation_303: PDS1_44 => ; Mass_Action_1_222(Vdpds_65, PDS1_44);
  DegradationofPDSinPE_305: PE_45 => ESP1_27; Mass_Action_1_222(Vdpds_65, PE_45); DegradationofPDSinPE_305 is "Degradation of PDS1 in PE";
  AssocwithESPtoformPE_306: PDS1_44 + ESP1_27 => PE_45; Mass_Action_2_221(kasesp_133, PDS1_44, ESP1_27); AssocwithESPtoformPE_306 is "Assoc. with ESP1 to form PE";
  DissofromPE_307: PE_45 => PDS1_44 + ESP1_27; Mass_Action_1_222(kdiesp_159, PE_45); DissofromPE_307 is "Disso. from PE";
  _308: => ORI_43; Mass_Action_0_223(ksori_206*(eorib5_99*CLB5_22 + eorib2_98*CLB2_20));
  _309: ORI_43 => ; Mass_Action_1_222(kdori_166, ORI_43);
  _310: => BUD_3; Mass_Action_0_223(ksbud_196*(ebudn2_82*CLN2_24 + ebudn3_83*CLN3_25 + ebudb5_81*CLB5_22));
  _311: BUD_3 => ; Mass_Action_1_222(kdbud_155, BUD_3);
  _312: => SPN_53; Mass_Action_0_223(ksspn_209*CLB2_20/(Jspn_120 + CLB2_20));
  _313: SPN_53 => ; Mass_Action_1_222(kdspn_169, SPN_53);
  _314: => MAD2_36; Mass_Action_0_223(0);
  _315: => LTE1_35; Mass_Action_0_223(0);
  _316: => BUB2_2; Mass_Action_0_223(0);

  // Events:
  at (CLB2_20 + CLB5_22 - KEZ2_172 < 0): ORI_43 = 0;
  at (ORI_43 - 1 > 0): MAD2_36 = mad2h_214, BUB2_2 = bub2h_76;
  at (SPN_53 - 1 > 0): MAD2_36 = mad2l_215, LTE1_35 = lte1h_212, BUB2_2 = bub2l_77;
  at (CLB2_20 - KEZ_171 < 0): MASS_37 = F_28*MASS_37, LTE1_35 = lte1l_213, BUD_3 = 0, SPN_53 = 0;
end
